<?xml version="1.0"?>
<!-- Generated by Aero-Matic v 1.1

     Inputs:
                horsepower: 12
                     pitch: fixed
            max engine rpm: 1025
        prop diameter (ft): 8.5

     Outputs:
              max prop rpm: 2207.41
                gear ratio:    0.46
                       Cp0: 0.001256
                       Ct0: 0.001759
       static thrust (lbs):   31.66
-->

<!--
 Source:
 "Evolution of Wright Flyer Propellers between 1903 and 1912"
 http://www.wrightexperience.com/pdfs/props.pdf

 Also:
 http://www.wright-brothers.org/Information_Desk/Just_the_Facts/Engines_&_Props/1903_Props.htm
-->


<propeller name="prop">
  <ixx>  14.07 </ixx>
  <diameter unit="IN"> 102.0 </diameter>
  <numblades> 2 </numblades>
  <gearratio>  0.35 </gearratio>
  <p_factor>   8.06 </p_factor>

  <table name="C_THRUST" type="internal">
     <tableData>
       0.0   0.0019
       0.1   0.0018
       0.2   0.0018
       0.3   0.0016
       0.4   0.0015
       0.5   0.0013
       0.6   0.0010
       0.7   0.0008
       0.8   0.0004
       1.0  -0.0001
       1.2  -0.0008
       1.4  -0.0014
     </tableData>
  </table>


  <table name="C_POWER" type="internal">
     <tableData>
       0.0   0.0013
       0.1   0.0013
       0.2   0.0013
       0.3   0.0012
       0.4   0.0012
       0.5   0.0011
       0.6   0.0010
       0.7   0.0008
       0.8   0.0007
       1.0   0.0002
       1.2  -0.0004
       1.4  -0.0011
       1.6  -0.0019
     </tableData>
  </table>

<!-- thrust effects of helical tip Mach -->
<table name="CT_MACH" type="internal">
  <tableData>
    0.85   1.0
    1.05   0.8
  </tableData>
</table>

<!-- power-required effects of helical tip Mach -->
<table name="CP_MACH" type="internal">
  <tableData>
    0.85   1.0
    1.05   1.8
    2.00   1.4
  </tableData>
</table>

</propeller>
